*Heading
** Job name: 16CshapedRibs Model name: 16CshapedRibs
** Generated by: Abaqus/CAE 2020
*Preprint, echo=NO, model=NO, history=NO, contact=NO
**
** PARTS
**
*Part, name=Base
*End Part
**
*Part, name=Hub
*Node
      1,   31.9380989,   -1.9894284,   22.2199993
      2,    31.752636,  -3.97116017,   22.2199993
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*Element, type=R3D4
   1,  101,    1,  102,  202
   2,    1,    2,  103,  102
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*Node
   1213,           0.,           0.,         100.
*Nset, nset=Hub-RefPt_, internal
1213,
*Elset, elset=Hub, generate
    1,  1111,     1
*End Part
**
*Part, name=Rollers
*End Part
**
*Part, name=rib
*End Part
**
**
** ASSEMBLY
**
*Assembly, name=Assembly
**
*Instance, name=rib-1-rad-1, part=rib
*Node
      1,   36.2650871,  -12.1270065,   -3.0672493
      2,   35.3790245,   1.91676629,   -3.6592989
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*Element, type=S4R
 1,   1, 121, 675, 134
 2, 121, 122, 676, 675
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*Nset, nset=AllRib, generate
    1,  1256,     1
*Elset, elset=AllRib, generate
    1,  1092,     1
** Section: Section-ribs
*Shell Section, elset=AllRib, material=Material-ribs
0.15, 5
*End Instance
**
*Instance, name=Rollers-1, part=Rollers
          0.,          8.5,           0.
          0.,          8.5,           0., 0.992432517778647, 8.58682659260788, -0.086826592607882, 90.4352295036925
*Node
      1,   75.4619293,  -6.26047421,   21.7199993
      2,   75.4619293,  -6.26047421,           0.
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*Element, type=R3D4
  1,    1,   33, 1185, 1221
  2,   33,   34, 1186, 1185
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*Node
  10657,           0.,           0.,           0.
*Nset, nset=Rollers-1-RefPt_, internal
10657,
*Nset, nset=Set-Ref-Rollers
 10657,
*Elset, elset=_Surf-Rollers_SPOS, internal, generate
     1,  10064,      1
*Surface, type=ELEMENT, name=Surf-Rollers
_Surf-Rollers_SPOS, SPOS
*Elset, elset=Rollers-1, generate
     1,  10064,      1
*End Instance
**
*Instance, name=Base-1, part=Base
          0.,           9.,           0.
          0.,           9.,           0., 1.00000001268805,           9.,           0., 89.9999992730282
*Node
      1,          75.,           0.,           0.
      2,        72.25,           0.,           0.
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*Element, type=R3D4
   1,    1,    2,   21,   20
   2,    2,    3,   22,   21
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*Node
   1141,           0.,           0.,           0.
*Nset, nset=Base-1-RefPt_, internal
1141,
*Nset, nset=Set-Ref-Base
 1141,
*Elset, elset=_Surf-Base_SPOS, internal, generate
    1,  1080,     1
*Surface, type=ELEMENT, name=Surf-Base
_Surf-Base_SPOS, SPOS
*Elset, elset=Base-1, generate
    1,  1080,     1
*End Instance
**
*Instance, name=Base-2, part=Base
          0.,       -13.22,           0.
          0.,       -13.22,           0., 1.00000001268805,       -13.22,           0., 89.9999992730282
*Node
      1,          75.,           0.,           0.
      2,        72.25,           0.,           0.
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*Element, type=R3D4
   1,    1,    2,   21,   20
   2,    2,    3,   22,   21
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*Node
   1141,           0.,           0.,           0.
*Nset, nset=Base-2-RefPt_, internal
1141,
*Nset, nset=Set-Ref-Base
 1141,
*Elset, elset=_Surf-Base_SPOS, internal, generate
    1,  1080,     1
*Surface, type=ELEMENT, name=Surf-Base
_Surf-Base_SPOS, SPOS
*Elset, elset=Base-2, generate
    1,  1080,     1
*End Instance
**
*Instance, name=Hub-1, part=Hub
          0.,       -13.22,           0.
          0.,       -13.22,           0., -1.00000001268805,       -13.22,           0., 89.9999992730282
*End Instance
**
*Instance, name=rib-1-rad-1-rad-2, part=rib
          0.,           0.,           0.
          0.,           0.,           0.,           0., 1.00000001838141,           0., 22.5000004495572
*Node
      1,   36.2650871,  -12.1270065,   -3.0672493
      2,   35.3790245,   1.91676629,   -3.6592989
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*Element, type=S4R
 1,   1, 121, 675, 134
 2, 121, 122, 676, 675
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*Nset, nset=AllRib, generate
    1,  1256,     1
*Elset, elset=AllRib, generate
    1,  1092,     1
** Section: Section-ribs
*Shell Section, elset=AllRib, material=Material-ribs
0.15, 5
*End Instance
**
*Instance, name=rib-1-rad-1-rad-3, part=rib
          0.,           0.,           0.
          0.,           0.,           0.,           0., 1.0000000139546,           0., 45.0000000171299
*Node
      1,   36.2650871,  -12.1270065,   -3.0672493
      2,   35.3790245,   1.91676629,   -3.6592989
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*Element, type=S4R
 1,   1, 121, 675, 134
 2, 121, 122, 676, 675
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*Nset, nset=AllRib, generate
    1,  1256,     1
*Elset, elset=AllRib, generate
    1,  1092,     1
** Section: Section-ribs
*Shell Section, elset=AllRib, material=Material-ribs
0.15, 5
*End Instance
**
*Instance, name=rib-1-rad-1-rad-4, part=rib
          0.,           0.,           0.
          0.,           0.,           0.,           0., 0.999999992005326,           0., 67.5000026186089
*Node
      1,   36.2650871,  -12.1270065,   -3.0672493
      2,   35.3790245,   1.91676629,   -3.6592989
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*Element, type=S4R
 1,   1, 121, 675, 134
 2, 121, 122, 676, 675
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*Nset, nset=AllRib, generate
    1,  1256,     1
*Elset, elset=AllRib, generate
    1,  1092,     1
** Section: Section-ribs
*Shell Section, elset=AllRib, material=Material-ribs
0.15, 5
*End Instance
**
*Instance, name=rib-1-rad-1-rad-5, part=rib
          0.,           0.,           0.
          0.,           0.,           0.,           0., 1.00000001268805,           0., 89.9999992730282
*Node
      1,   36.2650871,  -12.1270065,   -3.0672493
      2,   35.3790245,   1.91676629,   -3.6592989
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*Element, type=S4R
 1,   1, 121, 675, 134
 2, 121, 122, 676, 675
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*Nset, nset=AllRib, generate
    1,  1256,     1
*Elset, elset=AllRib, generate
    1,  1092,     1
** Section: Section-ribs
*Shell Section, elset=AllRib, material=Material-ribs
0.15, 5
*End Instance
**
*Instance, name=rib-1-rad-1-rad-6, part=rib
          0.,           0.,           0.
          0.,           0.,           0.,           0., 0.999999992737754,           0., 112.499998189007
*Node
      1,   36.2650871,  -12.1270065,   -3.0672493
      2,   35.3790245,   1.91676629,   -3.6592989
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*Element, type=S4R
 1,   1, 121, 675, 134
 2, 121, 122, 676, 675
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*Nset, nset=AllRib, generate
    1,  1256,     1
*Elset, elset=AllRib, generate
    1,  1092,     1
** Section: Section-ribs
*Shell Section, elset=AllRib, material=Material-ribs
0.15, 5
*End Instance
**
*Instance, name=rib-1-rad-1-rad-7, part=rib
          0.,           0.,           0.
          0.,           0.,           0.,           0., 0.999999990362471,           0., 134.999999807967
*Node
      1,   36.2650871,  -12.1270065,   -3.0672493
      2,   35.3790245,   1.91676629,   -3.6592989
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*Element, type=S4R
 1,   1, 121, 675, 134
 2, 121, 122, 676, 675
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*Nset, nset=AllRib, generate
    1,  1256,     1
*Elset, elset=AllRib, generate
    1,  1092,     1
** Section: Section-ribs
*Shell Section, elset=AllRib, material=Material-ribs
0.15, 5
*End Instance
**
*Instance, name=rib-1-rad-1-rad-8, part=rib
          0.,           0.,           0.
          0.,           0.,           0.,           0., 1.00000000801626,           0., 157.499998971644
*Node
      1,   36.2650871,  -12.1270065,   -3.0672493
      2,   35.3790245,   1.91676629,   -3.6592989
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*Element, type=S4R
 1,   1, 121, 675, 134
 2, 121, 122, 676, 675
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*Nset, nset=AllRib, generate
    1,  1256,     1
*Elset, elset=AllRib, generate
    1,  1092,     1
** Section: Section-ribs
*Shell Section, elset=AllRib, material=Material-ribs
0.15, 5
*End Instance
**
*Instance, name=rib-1-rad-1-rad-9, part=rib
          0.,           0.,           0.
          0.,           0.,           0.,           0.,           1.,           0.,         180.
*Node
      1,   36.2650871,  -12.1270065,   -3.0672493
      2,   35.3790245,   1.91676629,   -3.6592989
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*Element, type=S4R
 1,   1, 121, 675, 134
 2, 121, 122, 676, 675
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*Nset, nset=AllRib, generate
    1,  1256,     1
*Elset, elset=AllRib, generate
    1,  1092,     1
** Section: Section-ribs
*Shell Section, elset=AllRib, material=Material-ribs
0.15, 5
*End Instance
**
*Instance, name=rib-1-rad-1-rad-10, part=rib
          0.,           0.,           0.
          0.,           0.,           0.,           0., 1.00000000801626,           0., 202.500001028356
*Node
      1,   36.2650871,  -12.1270065,   -3.0672493
      2,   35.3790245,   1.91676629,   -3.6592989
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*Element, type=S4R
 1,   1, 121, 675, 134
 2, 121, 122, 676, 675
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*Nset, nset=AllRib, generate
    1,  1256,     1
*Elset, elset=AllRib, generate
    1,  1092,     1
** Section: Section-ribs
*Shell Section, elset=AllRib, material=Material-ribs
0.15, 5
*End Instance
**
*Instance, name=rib-1-rad-1-rad-11, part=rib
          0.,           0.,           0.
          0.,           0.,           0.,           0., 0.999999990362471,           0., 225.000000192033
*Node
      1,   36.2650871,  -12.1270065,   -3.0672493
      2,   35.3790245,   1.91676629,   -3.6592989
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*Element, type=S4R
 1,   1, 121, 675, 134
 2, 121, 122, 676, 675
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*Nset, nset=AllRib, generate
    1,  1256,     1
*Elset, elset=AllRib, generate
    1,  1092,     1
** Section: Section-ribs
*Shell Section, elset=AllRib, material=Material-ribs
0.15, 5
*End Instance
**
*Instance, name=rib-1-rad-1-rad-12, part=rib
          0.,           0.,           0.
          0.,           0.,           0.,           0., -0.999999992737754,           0., 112.499998189007
*Node
      1,   36.2650871,  -12.1270065,   -3.0672493
      2,   35.3790245,   1.91676629,   -3.6592989
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*Element, type=S4R
 1,   1, 121, 675, 134
 2, 121, 122, 676, 675
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*Nset, nset=AllRib, generate
    1,  1256,     1
*Elset, elset=AllRib, generate
    1,  1092,     1
** Section: Section-ribs
*Shell Section, elset=AllRib, material=Material-ribs
0.15, 5
*End Instance
**
*Instance, name=rib-1-rad-1-rad-13, part=rib
          0.,           0.,           0.
          0.,           0.,           0.,           0., -1.00000001268805,           0., 89.9999992730282
*Node
      1,   36.2650871,  -12.1270065,   -3.0672493
      2,   35.3790245,   1.91676629,   -3.6592989
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*Element, type=S4R
 1,   1, 121, 675, 134
 2, 121, 122, 676, 675
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*Nset, nset=AllRib, generate
    1,  1256,     1
*Elset, elset=AllRib, generate
    1,  1092,     1
** Section: Section-ribs
*Shell Section, elset=AllRib, material=Material-ribs
0.15, 5
*End Instance
**
*Instance, name=rib-1-rad-1-rad-14, part=rib
          0.,           0.,           0.
          0.,           0.,           0.,           0., -0.999999992005326,           0., 67.5000026186089
*Node
      1,   36.2650871,  -12.1270065,   -3.0672493
      2,   35.3790245,   1.91676629,   -3.6592989
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*Element, type=S4R
 1,   1, 121, 675, 134
 2, 121, 122, 676, 675
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*Nset, nset=AllRib, generate
    1,  1256,     1
*Elset, elset=AllRib, generate
    1,  1092,     1
** Section: Section-ribs
*Shell Section, elset=AllRib, material=Material-ribs
0.15, 5
*End Instance
**
*Instance, name=rib-1-rad-1-rad-15, part=rib
          0.,           0.,           0.
          0.,           0.,           0.,           0., -1.0000000139546,           0., 45.0000000171299
*Node
      1,   36.2650871,  -12.1270065,   -3.0672493
      2,   35.3790245,   1.91676629,   -3.6592989
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*Element, type=S4R
 1,   1, 121, 675, 134
 2, 121, 122, 676, 675
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*Nset, nset=AllRib, generate
    1,  1256,     1
*Elset, elset=AllRib, generate
    1,  1092,     1
** Section: Section-ribs
*Shell Section, elset=AllRib, material=Material-ribs
0.15, 5
*End Instance
**
*Instance, name=rib-1-rad-1-rad-16, part=rib
          0.,           0.,           0.
          0.,           0.,           0.,           0., -1.00000001838141,           0., 22.5000004495572
*Node
      1,   36.2650871,  -12.1270065,   -3.0672493
      2,   35.3790245,   1.91676629,   -3.6592989
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*Element, type=S4R
 1,   1, 121, 675, 134
 2, 121, 122, 676, 675
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*Nset, nset=AllRib, generate
    1,  1256,     1
*Elset, elset=AllRib, generate
    1,  1092,     1
** Section: Section-ribs
*Shell Section, elset=AllRib, material=Material-ribs
0.15, 5
*End Instance
**
*Node
      1,           0.,           0.,           0.
*Nset, nset=Set-68
 1,
*Nset, nset=Set-69, instance=Base-1
 1141,
*Nset, nset=Set-69, instance=Base-2
 1141,
*Nset, nset=Set-70, instance=Rollers-1
 10657,
*Nset, nset=Set-77, instance=Rollers-1
 10657,
*Nset, nset=Set-78
 1,
*Nset, nset=Set-79, instance=Hub-1
 1213,
*Nset, nset=Set-80, instance=Base-1
 1141,
*Nset, nset=Set-80, instance=Base-2
 1141,
*Nset, nset=m_Set-69
 1,
*Nset, nset=m_Set-75
 1,
*Nset, nset=s_Set-69, instance=rib-1-rad-1
   3,   4, 128, 129, 130, 131, 132, 133
*Elset, elset=s_Set-69, instance=rib-1-rad-1, generate
  8,  14,   1
*Nset, nset=s_Set-75, instance=rib-1-rad-1
   3,   4, 128, 129, 130, 131, 132, 133
*Elset, elset=s_Set-75, instance=rib-1-rad-1, generate
  8,  14,   1
*Nset, nset=_PickedSet219, internal, instance=rib-1-rad-1
   3,   4, 128, 129, 130, 131, 132, 133
*Nset, nset=_PickedSet219, internal, instance=rib-1-rad-1-rad-2
   3,   4, 128, 129, 130, 131, 132, 133
*Nset, nset=_PickedSet219, internal, instance=rib-1-rad-1-rad-4
   3,   4, 128, 129, 130, 131, 132, 133
*Nset, nset=_PickedSet219, internal, instance=rib-1-rad-1-rad-8
   3,   4, 128, 129, 130, 131, 132, 133
*Nset, nset=_PickedSet219, internal, instance=rib-1-rad-1-rad-12
   3,   4, 128, 129, 130, 131, 132, 133
*Nset, nset=_PickedSet219, internal, instance=rib-1-rad-1-rad-16
   3,   4, 128, 129, 130, 131, 132, 133
*Nset, nset=_PickedSet219, internal, instance=rib-1-rad-1-rad-6
   3,   4, 128, 129, 130, 131, 132, 133
*Nset, nset=_PickedSet219, internal, instance=rib-1-rad-1-rad-14
   3,   4, 128, 129, 130, 131, 132, 133
*Nset, nset=_PickedSet219, internal, instance=rib-1-rad-1-rad-10
   3,   4, 128, 129, 130, 131, 132, 133
*Nset, nset=_PickedSet219, internal, instance=rib-1-rad-1-rad-3
   3,   4, 128, 129, 130, 131, 132, 133
*Nset, nset=_PickedSet219, internal, instance=rib-1-rad-1-rad-5
   3,   4, 128, 129, 130, 131, 132, 133
*Nset, nset=_PickedSet219, internal, instance=rib-1-rad-1-rad-13
   3,   4, 128, 129, 130, 131, 132, 133
*Nset, nset=_PickedSet219, internal, instance=rib-1-rad-1-rad-9
   3,   4, 128, 129, 130, 131, 132, 133
*Nset, nset=_PickedSet219, internal, instance=rib-1-rad-1-rad-7
   3,   4, 128, 129, 130, 131, 132, 133
*Nset, nset=_PickedSet219, internal, instance=rib-1-rad-1-rad-15
   3,   4, 128, 129, 130, 131, 132, 133
*Nset, nset=_PickedSet219, internal, instance=rib-1-rad-1-rad-11
   3,   4, 128, 129, 130, 131, 132, 133
*Elset, elset=_PickedSet219, internal, instance=rib-1-rad-1, generate
  8,  14,   1
*Elset, elset=_PickedSet219, internal, instance=rib-1-rad-1-rad-2, generate
  8,  14,   1
*Elset, elset=_PickedSet219, internal, instance=rib-1-rad-1-rad-4, generate
  8,  14,   1
*Elset, elset=_PickedSet219, internal, instance=rib-1-rad-1-rad-8, generate
  8,  14,   1
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*Elset, elset=_Surf-bottombase_SNEG, internal, instance=Base-2, generate
    1,  1080,     1
*Surface, type=ELEMENT, name=Surf-bottombase
_Surf-bottombase_SNEG, SNEG
*Elset, elset=_Surf-hub_SPOS, internal, instance=Hub-1, generate
    1,  1111,     1
*Surface, type=ELEMENT, name=Surf-hub
_Surf-hub_SPOS, SPOS
*Elset, elset=_Surf-rib_, internal, instance=rib-1-rad-1, generate
    1,  1092,     1
*Elset, elset=_Surf-rib_, internal, instance=rib-1-rad-1-rad-2, generate
    1,  1092,     1
*Elset, elset=_Surf-rib_, internal, instance=rib-1-rad-1-rad-4, generate
    1,  1092,     1
*Elset, elset=_Surf-rib_, internal, instance=rib-1-rad-1-rad-8, generate
    1,  1092,     1
*Elset, elset=_Surf-rib_, internal, instance=rib-1-rad-1-rad-12, generate
    1,  1092,     1
*Elset, elset=_Surf-rib_, internal, instance=rib-1-rad-1-rad-16, generate
    1,  1092,     1
*Elset, elset=_Surf-rib_, internal, instance=rib-1-rad-1-rad-6, generate
    1,  1092,     1
*Elset, elset=_Surf-rib_, internal, instance=rib-1-rad-1-rad-14, generate
    1,  1092,     1
*Elset, elset=_Surf-rib_, internal, instance=rib-1-rad-1-rad-10, generate
    1,  1092,     1
*Elset, elset=_Surf-rib_, internal, instance=rib-1-rad-1-rad-3, generate
    1,  1092,     1
*Elset, elset=_Surf-rib_, internal, instance=rib-1-rad-1-rad-5, generate
    1,  1092,     1
*Elset, elset=_Surf-rib_, internal, instance=rib-1-rad-1-rad-13, generate
    1,  1092,     1
*Elset, elset=_Surf-rib_, internal, instance=rib-1-rad-1-rad-9, generate
    1,  1092,     1
*Elset, elset=_Surf-rib_, internal, instance=rib-1-rad-1-rad-7, generate
    1,  1092,     1
*Elset, elset=_Surf-rib_, internal, instance=rib-1-rad-1-rad-15, generate
    1,  1092,     1
*Elset, elset=_Surf-rib_, internal, instance=rib-1-rad-1-rad-11, generate
    1,  1092,     1
*Surface, type=ELEMENT, name=Surf-rib
_Surf-rib_,
*Elset, elset=_Surf-roller_SPOS, internal, instance=Rollers-1, generate
     1,  10064,      1
*Surface, type=ELEMENT, name=Surf-roller
_Surf-roller_SPOS, SPOS
*Elset, elset=_Surf-topbase_SPOS, internal, instance=Base-1, generate
    1,  1080,     1
*Surface, type=ELEMENT, name=Surf-topbase
_Surf-topbase_SPOS, SPOS
*Elset, elset=__PickedSurf220_SNEG, internal, instance=rib-1-rad-1, generate
    1,  1092,     1
*Elset, elset=__PickedSurf220_SNEG, internal, instance=rib-1-rad-1-rad-2, generate
    1,  1092,     1
*Elset, elset=__PickedSurf220_SNEG, internal, instance=rib-1-rad-1-rad-4, generate
    1,  1092,     1
*Elset, elset=__PickedSurf220_SNEG, internal, instance=rib-1-rad-1-rad-8, generate
    1,  1092,     1
*Elset, elset=__PickedSurf220_SNEG, internal, instance=rib-1-rad-1-rad-12, generate
    1,  1092,     1
*Elset, elset=__PickedSurf220_SNEG, internal, instance=rib-1-rad-1-rad-16, generate
    1,  1092,     1
*Elset, elset=__PickedSurf220_SNEG, internal, instance=rib-1-rad-1-rad-6, generate
    1,  1092,     1
*Elset, elset=__PickedSurf220_SNEG, internal, instance=rib-1-rad-1-rad-14, generate
    1,  1092,     1
*Elset, elset=__PickedSurf220_SNEG, internal, instance=rib-1-rad-1-rad-10, generate
    1,  1092,     1
*Elset, elset=__PickedSurf220_SNEG, internal, instance=rib-1-rad-1-rad-3, generate
    1,  1092,     1
*Elset, elset=__PickedSurf220_SNEG, internal, instance=rib-1-rad-1-rad-5, generate
    1,  1092,     1
*Elset, elset=__PickedSurf220_SNEG, internal, instance=rib-1-rad-1-rad-13, generate
    1,  1092,     1
*Elset, elset=__PickedSurf220_SNEG, internal, instance=rib-1-rad-1-rad-9, generate
    1,  1092,     1
*Elset, elset=__PickedSurf220_SNEG, internal, instance=rib-1-rad-1-rad-7, generate
    1,  1092,     1
*Elset, elset=__PickedSurf220_SNEG, internal, instance=rib-1-rad-1-rad-15, generate
    1,  1092,     1
*Elset, elset=__PickedSurf220_SNEG, internal, instance=rib-1-rad-1-rad-11, generate
    1,  1092,     1
*Surface, type=ELEMENT, name=_PickedSurf220, internal
__PickedSurf220_SNEG, SNEG
*Surface, type=NODE, name=_PickedSet219_CNS_, internal
_PickedSet219, 1.
*Rigid Body, ref node=Rollers-1.Rollers-1-RefPt_, elset=Rollers-1.Rollers-1
*Rigid Body, ref node=Base-1.Base-1-RefPt_, elset=Base-1.Base-1
*Rigid Body, ref node=Base-2.Base-2-RefPt_, elset=Base-2.Base-2
*Rigid Body, ref node=Hub-1.Hub-RefPt_, elset=Hub-1.Hub
** Constraint: Constraint-1
*MPC
BEAM, _PickedSet219, m_Set-75
*End Assembly
*Amplitude, name=Amp-1
             0.,              0.,              5.,              1.
**
** MATERIALS
**
*Material, name=Material-membrane
*Density
 2.6e-10,
*Elastic
 1.7, 0.3
*Expansion
 1e-05,
*Material, name=Material-ribs
*Density
 7.86e-09,
*Elastic
80000., 0.3
**
** INTERACTION PROPERTIES
**
*Surface Interaction, name=IntProp-1
*Friction
 0.4,
*Surface Behavior, pressure-overclosure=HARD
**
** BOUNDARY CONDITIONS
**
** Name: base Type: Displacement/Rotation
*Boundary
Set-80, 1, 1
Set-80, 2, 2
Set-80, 3, 3
Set-80, 4, 4
Set-80, 5, 5
Set-80, 6, 6
** Name: hub Type: Displacement/Rotation
*Boundary
Set-79, 1, 1
Set-79, 2, 2
Set-79, 3, 3
Set-79, 4, 4
Set-79, 5, 5
Set-79, 6, 6
** Name: ribend Type: Displacement/Rotation
*Boundary
Set-78, 1, 1
Set-78, 2, 2
Set-78, 3, 3
Set-78, 4, 4
Set-78, 5, 5
Set-78, 6, 6
** Name: rollor Type: Displacement/Rotation
*Boundary
Set-77, 1, 1
Set-77, 2, 2
Set-77, 3, 3
Set-77, 4, 4
Set-77, 5, 5
Set-77, 6, 6
**
** INTERACTIONS
**
** Interaction: Int-1
*Contact, op=NEW
*Contact Inclusions
Surf-rib , Surf-bottombase
Surf-rib , Surf-hub
Surf-rib ,
Surf-rib , Surf-topbase
Surf-rib , Surf-roller
*Contact Property Assignment
 ,  , IntProp-1
** ----------------------------------------------------------------
**
** STEP: Step-1
**
*Step, name=Step-1, nlgeom=YES
*Dynamic, Explicit
, 5.
*Bulk Viscosity
0.06, 1.2
** Mass Scaling: Semi-Automatic
**               Whole Model
*Variable Mass Scaling, dt=1e-06, type=below min, frequency=1
**
** BOUNDARY CONDITIONS
**
** Name: hub Type: Displacement/Rotation
*Boundary, amplitude=Amp-1
Set-79, 1, 1
Set-79, 2, 2
Set-79, 3, 3
Set-79, 4, 4
Set-79, 5, 5, 7.
Set-79, 6, 6
** Name: ribend Type: Displacement/Rotation
*Boundary, amplitude=Amp-1
Set-78, 1, 1
Set-78, 2, 2
Set-78, 3, 3
Set-78, 4, 4
Set-78, 5, 5, 7.
Set-78, 6, 6
**
** LOADS
**
** Name: Load-1   Type: Pressure
*Dsload
_PickedSurf220, VP, 1e-08
**
** OUTPUT REQUESTS
**
*Restart, write, number interval=1, time marks=NO
**
** FIELD OUTPUT: F-Output-1
**
*Output, field, variable=PRESELECT, time interval=0.02
**
** HISTORY OUTPUT: H-Output-1
**
*Output, history, variable=PRESELECT, time interval=0.02
*End Step
** ----------------------------------------------------------------
**
** STEP: Step-2
**
*Step, name=Step-2, nlgeom=YES
*Dynamic, Explicit
, 2.
*Bulk Viscosity
0.06, 1.2
**
** BOUNDARY CONDITIONS
**
** Name: hub Type: Displacement/Rotation
*Boundary, amplitude=Amp-1
Set-79, 5, 5
** Name: ribend Type: Displacement/Rotation
*Boundary, amplitude=Amp-1
Set-78, 5, 5
**
** LOADS
**
** Name: Load-1   Type: Pressure
*Dsload
_PickedSurf220, VP, 2e-08
**
** INTERACTIONS
**
** Interaction: Int-1
*Contact, op=NEW
*Contact Inclusions
Surf-rib , Surf-bottombase
Surf-rib , Surf-hub
Surf-rib ,
Surf-rib , Surf-topbase
*Contact Property Assignment
 ,  , IntProp-1
**
** OUTPUT REQUESTS
**
*Restart, write, number interval=1, time marks=NO
**
** FIELD OUTPUT: F-Output-1
**
*Output, field, variable=PRESELECT, time interval=0.01
**
** HISTORY OUTPUT: H-Output-1
**
*Output, history, variable=PRESELECT, time interval=0.01
*End Step
